# OpenSim document version 40000
Model K2L_scaled_sl_na:
  gravity: 0 -9.80665 0
  length_units: meters
  force_units: N
  credits:
    Rajagopal2016 LaiArnold2017 Model w/ updated wrapping surfaces, modified for movements involving high hip flexion
  publications:
    Catelli, DS; Wesseling, M; Jonkers, I; Lamontagne, M. A Musculoskeletal Model Customized for Squatting Task. Computer Methods in Biomechanics and Biomedical Engineering, in press (2018)
  Ground
  BodySet:
    Body pelvis: mass=14.19424 [kg] mass_center=(-0.0961247 0 0) inertia=(0.2098648 0.2098648 0.0947106 0 0 0)
        meshes=(r_pelvis.vtp l_pelvis.vtp sacrum.vtp)
      WrapCylinder Gmax1_at_pelvis_r: xyz_body_rotation=(-0.6 0.45 0.5) translation=(-0.08293645 -0.07736216 0.1216096)
          quadrant=-x radius=0.04798862 length=0.1525326
      WrapEllipsoid Gmax2_at_pelvis_r: xyz_body_rotation=(-0.5 0.39 0) translation=(-0.07885761 -0.04292352 0.1216096)
          quadrant=all dimensions=(0.09033098 0.07299833 0.129074)
      WrapCylinder Gmax3_at_pelvis_r: xyz_body_rotation=(-0.1 0 0) translation=(-0.112848 -0.08784349 0.0918828)
          quadrant=all radius=0.04723934 length=0.1348155
      WrapCylinder Post_at_pelvis_r: xyz_body_rotation=(-0.1 0 0) translation=(-0.08157683 -0.0698755 0.0918828)
          quadrant=all radius=0.04723934 length=0.1617787
      WrapCylinder Gmed_at_pelvis_r: xyz_body_rotation=(-1 0.6 0.7) translation=(-0.04078842 -0.05490218 0.1351218)
          quadrant=-x radius=0.05078036 length=0.179564
      WrapCylinder Gmax1_at_pelvis_l: xyz_body_rotation=(0.6 -0.45 0.5)
          translation=(-0.08293645 -0.07736216 -0.1216096) quadrant=-x radius=0.04798862 length=0.1525326
      WrapEllipsoid Gmax2_at_pelvis_l: xyz_body_rotation=(0.5 -0.39 0) translation=(-0.07885761 -0.04292352 -0.1216096)
          quadrant=all dimensions=(0.09033098 0.07299833 0.129074)
      WrapCylinder Gmax3_at_pelvis_l: xyz_body_rotation=(0.1 0 0) translation=(-0.112848 -0.08784349 -0.0918828)
          quadrant=all radius=0.04723934 length=0.1348155
      WrapCylinder Post_at_pelvis_l: xyz_body_rotation=(0.1 0 0) translation=(-0.08157683 -0.0698755 -0.0918828)
          quadrant=all radius=0.04723934 length=0.1617787
      WrapCylinder Gmed_at_pelvis_l: xyz_body_rotation=(1 -0.6 0.7) translation=(-0.04078842 -0.05490218 -0.1351218)
          quadrant=-x radius=0.05078036 length=0.179564
      WrapCylinder PS_at_brim_r: xyz_body_rotation=(-0.25 -0.27 0.1) translation=(-0.1006114 -0.05989329 0.08863988)
          quadrant=-y radius=0.05957968 length=0.1334263
      WrapCylinder PS_at_brim_l: xyz_body_rotation=(0.25 0.27 0.1) translation=(-0.1006114 -0.05989329 -0.08863988)
          quadrant=-y radius=0.05957968 length=0.1334263
      WrapCylinder IL_at_brim_r: xyz_body_rotation=(-0.32 -0.24 0.9) translation=(-0.09653259 -0.0648844 0.1021521)
          quadrant=-y radius=0.06626784 length=0.1322742
      WrapCylinder IL_at_brim_l: xyz_body_rotation=(0.32 0.24 0.9) translation=(-0.09653259 -0.0648844 -0.1021521)
          quadrant=-y radius=0.06626784 length=0.1322742
    Body femur_l: mass=11.21052 mass_center=(0 -0.150643 0) inertia=(0.1499867 0.07974483 0.1499867 0 0 0)
        meshes=l_femur.vtp
    Body femoral_component: mass=0.01 mass_center=(0 0 0) inertia=(0 0 0 0 0 0) meshes=femur_implant_Mplus_JWI.obj
    Body tibia_l: mass=4.468468 mass_center=(0 -0.2078561 0) inertia=(0.07761884 0.01227381 0.07761884 0 0 0)
        meshes=(l_tibia.vtp l_fibula.vtp)
      WrapCylinder GasLat_at_condyles_l: translation=(-0.005027109 -0.04453264 0) quadrant=all radius=0.03081121
          length=0.1588815
      WrapEllipsoid tibia_lat_elip_wrap: xyz_body_rotation=(0 1.5708 0) translation=(0 -0.03339948 -0.01588815)
          quadrant=-z dimensions=(0.04766446 0.03339948 0.03770331)
      WrapEllipsoid tibia_med_elip_wrap: translation=(0 -0.03339948 0) quadrant=+z
          dimensions=(0.03770331 0.03339948 0.04766446)
      WrapCylinder tibia_med_wrap: xyz_body_rotation=(0 1.5708 0) translation=(0 -0.03339948 0) quadrant=-x
          radius=0.04053197 length=0.1005422
      WrapCylinder tibia_lat_wrap: xyz_body_rotation=(0 1.5708 0) translation=(0 -0.03005953 -0.01588815) quadrant=+x
          radius=0.03377664 length=0.1005422
    Body tibial_plat: mass=0.01 mass_center=(0 0 0) inertia=(0 0 0 0 0 0) meshes=tibia_inlay_JWI.obj
    Body patella_l: mass=0.1038926 mass_center=(0.002135586 0.03132192 0)
        inertia=(4.869096e-6 2.224176e-5 2.224176e-5 0 0 0) meshes=l_patella.vtp
    Body talus_l: mass=0.1205251 mass_center=(0 0 0) inertia=(0.002131913 0.002017797 0.002017797 0 0 0)
        meshes=l_talus.vtp
    Body calcn_l: mass=1.506564 mass_center=(0.1175523 0.03622287 0)
        inertia=(0.002731903 0.006695496 0.006695496 0 0 0) meshes=l_foot.vtp
    Body toes_l: mass=0.2610574 mass_center=(0.04067311 0.007244573 0.02346585)
        inertia=(0.000195136 0.0003473904 0.0003473904 0 0 0) meshes=l_bofoot.vtp
    Body torso: mass=32.33279 mass_center=(-0.0347979 0.3141949 0) inertia=(1.918725 1.288781 1.918725 0 0 0)
        meshes=(hat_spine.vtp hat_jaw.vtp hat_skull.vtp hat_ribs_scap.vtp)
  JointSet:
    CustomJoint ground_pelvis: socket_parent_frame=ground_offset socket_child_frame=pelvis_offset
      Coordinate pelvis_tilt: default_value=0 range=(-1.570796 1.570796) clamped=true
          is_free_to_satisfy_constraints=true
      Coordinate pelvis_tx: default_value=0 range=(-5 5) clamped=true is_free_to_satisfy_constraints=true
      Coordinate pelvis_ty: default_value=0.97 range=(-1 2) clamped=true is_free_to_satisfy_constraints=true
      PhysicalOffsetFrame ground_offset: socket_parent=/ground translation=(0 0 0) [meters]
      PhysicalOffsetFrame pelvis_offset: socket_parent=/bodyset/pelvis translation=(0 0 0)
      SpatialTransform: axes_held_at_zero=(rotation2 rotation3 translation3)
        TransformAxis rotation1: coordinates=pelvis_tilt axis=(0 0 1) LinearFunction(coefficients=1 0)
        TransformAxis translation1: coordinates=pelvis_tx axis=(1 0 0) LinearFunction(coefficients=1 0)
        TransformAxis translation2: coordinates=pelvis_ty axis=(0 1 0) LinearFunction(coefficients=1 0)
    CustomJoint hip_l: socket_parent_frame=pelvis_offset socket_child_frame=femur_l_offset
      Coordinate hip_flexion_l: default_value=2.332052e-9 range=(-0.5235988 2.40855) clamped=true
      Coordinate hip_adduction_l: default_value=-1.199293e-9 range=(-0.8726646 0.5235988) clamped=true
          is_free_to_satisfy_constraints=true
      Coordinate hip_rotation_l: default_value=0 range=(-0.6981317 0.6981317) clamped=true
          is_free_to_satisfy_constraints=true
      PhysicalOffsetFrame pelvis_offset: socket_parent=/bodyset/pelvis translation=(-0.07651363 -0.0783504 -0.1043951)
      PhysicalOffsetFrame femur_l_offset: socket_parent=/bodyset/femur_l translation=(0 0 0)
      SpatialTransform: axes_held_at_zero=(translation1 translation2 translation3)
        TransformAxis rotation1: coordinates=hip_flexion_l axis=(0 0 1) LinearFunction(coefficients=1 0)
        TransformAxis rotation2: coordinates=hip_adduction_l axis=(1 0 0) LinearFunction(coefficients=-1 0)
        TransformAxis rotation3: coordinates=hip_rotation_l axis=(0 1 0) LinearFunction(coefficients=-1 0)
    WeldJoint femur_weld: socket_parent_frame=femur_l_offset socket_child_frame=femoral_component_offset
      PhysicalOffsetFrame femur_l_offset: socket_parent=/bodyset/femur_l
          translation=(-0.005338964 -0.3629609 0.002780427) orientation=(-1.5708 0 -1.5708) [radians]
      PhysicalOffsetFrame femoral_component_offset: socket_parent=/bodyset/femoral_component
          translation=(0.002372873 0 0.002372873) orientation=(0 0.0453786 0)
    CustomJoint knee_l: socket_parent_frame=femoral_component_offset socket_child_frame=tibial_plat_offset
      Coordinate knee_flexion_l: default_value=0 range=(0 2.53073) clamped=true
      Coordinate knee_adduction_l: default_value=0 range=(-0.523599 0.523599) clamped=true
      Coordinate knee_rotation_l: default_value=0 range=(-0.523599 0.523599) clamped=true
      PhysicalOffsetFrame femoral_component_offset: socket_parent=/bodyset/femoral_component translation=(0 0 0)
          orientation=(-1.44619 0 -3.0708)
      PhysicalOffsetFrame tibial_plat_offset: socket_parent=/bodyset/tibial_plat
          translation=(0 -0.006283886 0.02387877) orientation=(-1.44619 0 -3.0708)
      SpatialTransform:
        TransformAxis rotation1: coordinates=knee_flexion_l axis=(1 0 0) LinearFunction(coefficients=1 0)
        TransformAxis rotation2: coordinates=knee_adduction_l axis=(0 0 1) LinearFunction(coefficients=1 0)
        TransformAxis rotation3: coordinates=knee_rotation_l axis=(0 -1 0) LinearFunction(coefficients=1 0)
        TransformAxis translation1: coordinates=knee_flexion_l axis=(1 0 0)
          MultiplierFunction: scale=1.186436
            PolynomialFunction: coefficients=(-1.4607e-5 0.00023553 -0.0011553 0.0019224 -7.8692e-7 1.1753e-7)
        TransformAxis translation2: coordinates=knee_flexion_l axis=(0 1 0)
          MultiplierFunction: scale=1.186436
            PolynomialFunction: coefficients=(-0.00039217 0.0014737 0.0013167 -0.0086276 0.0032066 -1.2095e-6)
        TransformAxis translation3: coordinates=knee_flexion_l axis=(0 0 1)
          MultiplierFunction: scale=1.186436
            PolynomialFunction: coefficients=(-0.0002698 0.0026208 -0.0070425 0.0025482 0.005763 1.8606e-6)
    WeldJoint tibial_plat_weld: socket_parent_frame=tibial_plat_offset socket_child_frame=tibia_l_offset
      PhysicalOffsetFrame tibial_plat_offset: socket_parent=/bodyset/tibial_plat translation=(0 0 0)
          orientation=(-1.5708 1.57079 -3.14159)
      PhysicalOffsetFrame tibia_l_offset: socket_parent=/bodyset/tibia_l
          translation=(-0.003770331 -0.02727624 -0.004766446) orientation=(0.0418879 0 0.191986)
    CustomJoint patellofemoral_l: socket_parent_frame=femur_l_offset socket_child_frame=patella_l_offset
      Coordinate patellar_flexion_l: default_value=4.877992e-5 range=(-99999.9 99999.9) clamped=false
      PhysicalOffsetFrame femur_l_offset: socket_parent=/bodyset/femur_l
          translation=(-0.009598271 -0.3615076 0.004369242)
      PhysicalOffsetFrame patella_l_offset: socket_parent=/bodyset/patella_l translation=(0 0 0)
      SpatialTransform: axes_held_at_zero=(rotation2 rotation3)
        TransformAxis rotation1: coordinates=patellar_flexion_l axis=(0 0 1)
          SimmSpline: x=(0 0.174533 0.349066 0.523599 0.698132 0.872665 1.0472 1.22173 1.39626 1.5708 1.74533 1.91986 2.0944)
              y=(0.00113686 -0.00629212 -0.105582 -0.253683 -0.414245 -0.579047 -0.747244 -0.91799 -1.09044 -1.26379 -1.43763 -1.61186 -1.78634)
        TransformAxis translation1: coordinates=patellar_flexion_l axis=(1 0 0)
          MultiplierFunction: scale=1.186436
            SimmSpline: x=(0 0.174533 0.349066 0.523599 0.698132 0.872665 1.0472 1.22173 1.39626 1.5708 1.74533 1.91986 2.0944)
                y=(0.0524 0.0488 0.0437 0.0371 0.0296 0.0216 0.0136 0.0057 -0.0019 -0.0088 -0.0148 -0.0196 -0.0227)
        TransformAxis translation2: coordinates=patellar_flexion_l axis=(0 1 0)
          MultiplierFunction: scale=0.886135
            SimmSpline: x=(0 0.174533 0.349066 0.523599 0.698132 0.872665 1.0472 1.22173 1.39626 1.5708 1.74533 1.91986 2.0944)
                y=(-0.0108 -0.019 -0.0263 -0.0322 -0.0367 -0.0395 -0.0408 -0.0404 -0.0384 -0.0349 -0.0301 -0.0245 -0.0187)
        TransformAxis translation3: axis=(0 0 1) MultiplierFunction(scale=1.588815, Constant(value=-0.00275))
    PinJoint ankle_l: socket_parent_frame=tibia_l_offset socket_child_frame=talus_l_offset
      Coordinate ankle_angle_l: default_value=8.352658e-11 range=(-0.6981317 0.6981317) clamped=true
      PhysicalOffsetFrame tibia_l_offset: socket_parent=/bodyset/tibia_l translation=(-0.01256777 -0.4453264 0)
          orientation=(-0.175895 0.105208 0.0186622)
      PhysicalOffsetFrame talus_l_offset: socket_parent=/bodyset/talus_l translation=(0 0 0)
          orientation=(-0.175895 0.105208 0.0186622)
    PinJoint subtalar_l: socket_parent_frame=talus_l_offset socket_child_frame=calcn_l_offset
      Coordinate subtalar_angle_l: default_value=0 range=(-0.6108652 0.6108652) clamped=true
          is_free_to_satisfy_constraints=true
      PhysicalOffsetFrame talus_l_offset: socket_parent=/bodyset/talus_l
          translation=(-0.06129302 -0.0467036 -0.01258342) orientation=(1.76819 -0.906223 1.8196)
      PhysicalOffsetFrame calcn_l_offset: socket_parent=/bodyset/calcn_l translation=(0 0 0)
          orientation=(1.76819 -0.906223 1.8196)
    WeldJoint mtp_l: socket_parent_frame=calcn_l_offset socket_child_frame=toes_l_offset
      PhysicalOffsetFrame calcn_l_offset: socket_parent=/bodyset/calcn_l
          translation=(0.2101836 -0.002414858 -0.001448178) orientation=(-3.14159 -0.619901 0)
      PhysicalOffsetFrame toes_l_offset: socket_parent=/bodyset/toes_l translation=(0 0 0)
          orientation=(-3.14159 -0.619901 0)
    CustomJoint back: socket_parent_frame=pelvis_offset socket_child_frame=torso_offset
      Coordinate lumbar_extension: default_value=0 range=(-1.570796 1.570796) clamped=true
      PhysicalOffsetFrame pelvis_offset: socket_parent=/bodyset/pelvis translation=(-0.1369131 0.08135505 0)
      PhysicalOffsetFrame torso_offset: socket_parent=/bodyset/torso translation=(0 0 0)
      SpatialTransform: axes_held_at_zero=(rotation2 rotation3 translation1 translation2 translation3)
        TransformAxis rotation1: coordinates=lumbar_extension axis=(0 0 1) LinearFunction(coefficients=1 0)
  ConstraintSet:
    WeldConstraint weld_heel_l: socket_frame1=ground_offset socket_frame2=calcn_l_offset
      PhysicalOffsetFrame ground_offset: socket_parent=/ground translation=(0 0 -0.2) orientation=(0 0.0872665 0)
      PhysicalOffsetFrame calcn_l_offset: socket_parent=/bodyset/calcn_l translation=(0 0 0)
    CoordinateCouplerConstraint patellofemoral_knee_flexion_l_con: independent_coordinate_names=knee_flexion_l
        dependent_coordinate_name=patellar_flexion_l scale_factor=1
        coupled_coordinates_function=LinearFunction(coefficients=1 0)
  ForceSet:
    Blankevoort1991Ligament cPT: linear_stiffness=6000 [N] slack_length=0.05898364 [m]
      PathPoint cPT_f: patella_l (0.002372873 0.001186436 0)
      PathPoint cPT_t: tibia_l (0.03393298 -0.06457232 -0.007944077)
      PathWrap: wrap_object=GasLat_at_condyles_l method=hybrid
    Blankevoort1991Ligament aLCL: linear_stiffness=2000 slack_length=0.09133802
      PathPoint aLCL_f: femur_l (0 -0.3597708 -0.05954045)
      PathPoint aLCL_t: tibia_l (-0.02387877 -0.06345901 -0.06037499)
      PathWrap: wrap_object=tibia_lat_elip_wrap method=hybrid
    Blankevoort1991Ligament mLCL: linear_stiffness=2000 slack_length=0.0719046
      PathPoint mLCL_f: femur_l (-0.004745746 -0.3596501 -0.05878617)
      PathPoint mLCL_t: tibia_l (-0.0276491 -0.06345901 -0.06037499)
      PathWrap: wrap_object=tibia_lat_elip_wrap method=hybrid
    Blankevoort1991Ligament pLCL: linear_stiffness=2000 slack_length=0.06197487
      PathPoint pLCL_f: femur_l (-0.009491491 -0.3597708 -0.05878617)
      PathPoint pLCL_t: tibia_l (-0.03516763 -0.0609463 -0.056376)
      PathWrap: wrap_object=tibia_lat_elip_wrap method=hybrid
    Blankevoort1991Ligament aMCL: linear_stiffness=2750 slack_length=0.09699681
      PathPoint aMCL_f: femur_l (0.005833737 -0.3607892 0.05878617)
      PathPoint aMCL_t: tibia_l (0.01137769 -0.08906527 0.01429934)
      PathWrap: wrap_object=tibia_med_elip_wrap method=hybrid
    Blankevoort1991Ligament mMCL: linear_stiffness=2750 slack_length=0.09882487
      PathPoint mMCL_f: femur_l (-0.0002910937 -0.3612268 0.05878617)
      PathPoint mMCL_t: tibia_l (0.006135896 -0.09240522 0.01588815)
      PathWrap: wrap_object=tibia_med_elip_wrap method=hybrid
    Blankevoort1991Ligament pMCL: linear_stiffness=2750 slack_length=0.1067539
      PathPoint pMCL_f: femur_l (-0.006511111 -0.3620666 0.05878617)
      PathPoint pMCL_t: tibia_l (0 -0.09463185 0.01588815)
      PathWrap: wrap_object=tibia_med_elip_wrap method=hybrid
    Blankevoort1991Ligament aPCL: linear_stiffness=9000 slack_length=0.04986564
      PathPoint aPCL_f: femur_l (0 -0.3659738 0.004766446)
      PathPoint aPCL_t: tibia_l (-0.02890587 -0.03117285 -0.01112171)
    Blankevoort1991Ligament pPCL: linear_stiffness=9000 slack_length=0.0411051
      PathPoint pPCL_f: femur_l (0.003559309 -0.3686322 0.003177631)
      PathPoint pPCL_t: tibia_l (-0.03016265 -0.03339948 -0.007944077)
