# OpenSim document version 40500
Model K3R_scaled_sl_na:
  gravity: 0 -9.80665 0
  length_units: meters
  force_units: N
  credits:
    Rajagopal2016 LaiArnold2017 Model w/ updated wrapping surfaces, modified for movements involving high hip flexion
  publications:
    Catelli, DS; Wesseling, M; Jonkers, I; Lamontagne, M. A Musculoskeletal Model Customized for Squatting Task. Computer Methods in Biomechanics and Biomedical Engineering, in press (2018)
  Ground
  BodySet:
    Body pelvis: mass=15.67932 [kg] mass_center=(-0.1035737 0 0) inertia=(0.2298673 0.2298673 0.103253 0 0 0)
        meshes=(r_pelvis.vtp l_pelvis.vtp sacrum.vtp)
    Body femur_r: mass=12.38343 mass_center=(0 -0.1601046 0) inertia=(0.1780481 0.08130761 0.1780481 0 0 0)
        meshes=r_femur.vtp
      WrapEllipsoid femur_wrap: translation=(0.005801954 -0.3767167 -0.001499433) quadrant=x
          dimensions=(0.04061368 0.03296271 0.05397961)
      WrapCylinder GasLat_at_condyles_r: translation=(-0.005801954 0 0.01499433) quadrant=all radius=0.02522619
          length=0.08996601
    Body femoral_component: mass=0.01 mass_center=(0 0 0) inertia=(0 0 0 0 0 0) meshes=femur_implant_Mplus_JWI.obj
    Body tibia_r: mass=4.935984 mass_center=(0 -0.2137667 0) inertia=(0.08963586 0.01224109 0.08963586 0 0 0)
        meshes=(r_tibia.vtp r_fibula.vtp)
      WrapCylinder tibia_med_wrap: xyz_body_rotation=(0 1.5708 0) translation=(0 -0.03434923 0) quadrant=+x
          radius=0.03966612 length=0.09618786
      WrapCylinder tibia_lat_wrap: xyz_body_rotation=(0 1.5708 0) translation=(0 -0.03091431 0.01949264) quadrant=-x
          radius=0.0330551 length=0.09618786
    Body tibial_plat: mass=0.01 mass_center=(0 0 0) inertia=(0 0 0 0 0 0) meshes=tibia_inlay_JWI.obj
    Body talus_r: mass=0.1331351 mass_center=(0 0 0) inertia=(0.002285681 0.002105168 0.002105168 0 0 0)
        meshes=r_talus.vtp
    Body patella_r: mass=0.1147625 mass_center=(0.002088703 0.03063431 0)
        inertia=(5.144972e-6 2.350194e-5 2.350194e-5 0 0 0) meshes=r_patella.vtp
    Body calcn_r: mass=1.664189 mass_center=(0.1203459 0.03583989 0) inertia=(0.00287692 0.007608741 0.007608741 0 0 0)
        meshes=r_foot.vtp
    Body toes_r: mass=0.2883707 mass_center=(0.04163967 0.007167978 -0.02260995)
        inertia=(0.0002054943 0.000391979 0.000391979 0 0 0) meshes=r_bofoot.vtp
    Body torso: mass=35.71562 mass_center=(-0.03160246 0.3314972 0) inertia=(2.13523 1.136525 2.13523 0 0 0)
        meshes=(hat_spine.vtp hat_jaw.vtp hat_skull.vtp hat_ribs_scap.vtp)
  JointSet:
    CustomJoint ground_pelvis: socket_parent_frame=ground_offset socket_child_frame=pelvis_offset
      Coordinate pelvis_tilt: default_value=0 range=(-3.14 3.14) clamped=true is_free_to_satisfy_constraints=true
      Coordinate pelvis_tx: default_value=0 range=(-5 5) clamped=true
      Coordinate pelvis_ty: default_value=0.97 range=(-1 2) clamped=true
      PhysicalOffsetFrame ground_offset: socket_parent=/ground translation=(0 0 0) [meters]
      PhysicalOffsetFrame pelvis_offset: socket_parent=/bodyset/pelvis translation=(0 0 0)
      SpatialTransform: axes_held_at_zero=(rotation2 rotation3 translation3)
        TransformAxis rotation1: coordinates=pelvis_tilt axis=(0 0 1) LinearFunction(coefficients=1 0)
        TransformAxis translation1: coordinates=pelvis_tx axis=(1 0 0) LinearFunction(coefficients=1 0)
        TransformAxis translation2: coordinates=pelvis_ty axis=(0 1 0) LinearFunction(coefficients=1 0)
    CustomJoint hip_r: socket_parent_frame=pelvis_offset socket_child_frame=femur_r_offset
      Coordinate hip_flexion_r: default_value=2.332052e-9 range=(-0.5235988 2.40855) clamped=true
      Coordinate hip_adduction_r: default_value=-1.199293e-9 range=(-0.8726646 0.5235988) clamped=true
      Coordinate hip_rotation_r: default_value=0 range=(-0.6981317 0.6981317) clamped=true
      PhysicalOffsetFrame pelvis_offset: socket_parent=/bodyset/pelvis translation=(-0.08244294 -0.07176545 0.1040248)
      PhysicalOffsetFrame femur_r_offset: socket_parent=/bodyset/femur_r translation=(0 0 0)
      SpatialTransform: axes_held_at_zero=(translation1 translation2 translation3)
        TransformAxis rotation1: coordinates=hip_flexion_r axis=(0 0 1) LinearFunction(coefficients=1 0)
        TransformAxis rotation2: coordinates=hip_adduction_r axis=(1 0 0) LinearFunction(coefficients=1 0)
        TransformAxis rotation3: coordinates=hip_rotation_r axis=(0 1 0) LinearFunction(coefficients=1 0)
    WeldJoint femur_weld: socket_parent_frame=femur_r_offset socket_child_frame=femoral_component_offset
      PhysicalOffsetFrame femur_r_offset: socket_parent=/bodyset/femur_r
          translation=(-0.005221758 -0.3857579 -0.002624009) orientation=(-1.5708 0 -1.5708) [radians]
      PhysicalOffsetFrame femoral_component_offset: socket_parent=/bodyset/femoral_component
          translation=(-0.002180487 0 0.002180487) orientation=(0 -0.0523599 0)
    CustomJoint knee_r: socket_parent_frame=femoral_component_offset socket_child_frame=tibial_plat_offset
      Coordinate knee_flexion_r: default_value=0 range=(0 2.0944) clamped=true
      Coordinate knee_adduction_r: default_value=0 range=(-0.523599 0.523599) clamped=true
      Coordinate knee_rotation_r: default_value=0 range=(-0.523599 0.523599) clamped=true
      PhysicalOffsetFrame femoral_component_offset: socket_parent=/bodyset/femoral_component translation=(0 0 0)
          orientation=(-1.44619 0 3.0708)
      PhysicalOffsetFrame tibial_plat_offset: socket_parent=/bodyset/tibial_plat
          translation=(0 -0.005685796 0.02160602) orientation=(-1.44619 0 3.0708)
      SpatialTransform:
        TransformAxis rotation1: coordinates=knee_flexion_r axis=(1 0 0) LinearFunction(coefficients=1 0)
        TransformAxis rotation2: coordinates=knee_adduction_r axis=(0 0 1) LinearFunction(coefficients=1 0)
        TransformAxis rotation3: coordinates=knee_rotation_r axis=(0 1 0) LinearFunction(coefficients=1 0)
        TransformAxis translation1: coordinates=knee_flexion_r axis=(1 0 0)
            MultiplierFunction(scale=1.090243, Constant(value=0))
        TransformAxis translation2: coordinates=knee_flexion_r axis=(0 1 0)
            MultiplierFunction(scale=1.090243, Constant(value=0))
        TransformAxis translation3: coordinates=knee_flexion_r axis=(0 0 1)
            MultiplierFunction(scale=1.090243, Constant(value=0))
    WeldJoint tibial_plat_weld: socket_parent_frame=tibial_plat_offset socket_child_frame=tibia_r_offset
      PhysicalOffsetFrame tibial_plat_offset: socket_parent=/bodyset/tibial_plat translation=(0 0 0)
          orientation=(-1.5708 1.57079 -3.14159)
      PhysicalOffsetFrame tibia_r_offset: socket_parent=/bodyset/tibia_r
          translation=(-0.003607045 -0.02805187 0.0044983) orientation=(-0.00872665 0 0.174533)
    CustomJoint patellofemoral_r: socket_parent_frame=femur_r_offset socket_child_frame=patella_r_offset
      Coordinate patellar_flexion_r: default_value=4.877666e-5 range=(-99999.9 99999.9) clamped=false
      PhysicalOffsetFrame femur_r_offset: socket_parent=/bodyset/femur_r
          translation=(-0.009387561 -0.3842133 -0.004123442)
      PhysicalOffsetFrame patella_r_offset: socket_parent=/bodyset/patella_r translation=(0 0 0)
      SpatialTransform: axes_held_at_zero=(rotation2 rotation3)
        TransformAxis rotation1: coordinates=patellar_flexion_r axis=(0 0 1)
          SimmSpline: x=(0 0.174533 0.349066 0.523599 0.698132 0.872665 1.0472 1.22173 1.39626 1.5708 1.74533 1.91986 2.0944)
              y=(0.00113686 -0.00629212 -0.105582 -0.253683 -0.414245 -0.579047 -0.747244 -0.91799 -1.09044 -1.26379 -1.43763 -1.61186 -1.78634)
        TransformAxis translation1: coordinates=patellar_flexion_r axis=(1 0 0)
          MultiplierFunction: scale=1.160391
            SimmSpline: x=(0 0.174533 0.349066 0.523599 0.698132 0.872665 1.0472 1.22173 1.39626 1.5708 1.74533 1.91986 2.0944)
                y=(0.0524 0.0488 0.0437 0.0371 0.0296 0.0216 0.0136 0.0057 -0.0019 -0.0088 -0.0148 -0.0196 -0.0227)
        TransformAxis translation2: coordinates=patellar_flexion_r axis=(0 1 0)
          MultiplierFunction: scale=0.9417917
            SimmSpline: x=(0 0.174533 0.349066 0.523599 0.698132 0.872665 1.0472 1.22173 1.39626 1.5708 1.74533 1.91986 2.0944)
                y=(-0.0108 -0.019 -0.0263 -0.0322 -0.0367 -0.0395 -0.0408 -0.0404 -0.0384 -0.0349 -0.0301 -0.0245 -0.0187)
        TransformAxis translation3: axis=(0 0 1) MultiplierFunction(scale=1.499433, Constant(value=0.00275))
    PinJoint ankle_r: socket_parent_frame=tibia_r_offset socket_child_frame=talus_r_offset
      Coordinate ankle_angle_r: default_value=-1.182866e-9 range=(-0.6981317 0.6981317) clamped=true
      PhysicalOffsetFrame tibia_r_offset: socket_parent=/bodyset/tibia_r translation=(-0.01202348 -0.4579898 0)
          orientation=(0.175895 -0.105208 0.0186622)
      PhysicalOffsetFrame talus_r_offset: socket_parent=/bodyset/talus_r translation=(0 0 0)
          orientation=(0.175895 -0.105208 0.0186622)
    PinJoint subtalar_r: socket_parent_frame=talus_r_offset socket_child_frame=calcn_r_offset
      Coordinate subtalar_angle_r: default_value=0 range=(-0.6108652 0.6108652) clamped=true
      PhysicalOffsetFrame talus_r_offset: socket_parent=/bodyset/talus_r
          translation=(-0.05863852 -0.04803168 0.01187551) orientation=(-1.76819 0.906223 1.8196)
      PhysicalOffsetFrame calcn_r_offset: socket_parent=/bodyset/calcn_r translation=(0 0 0)
          orientation=(-1.76819 0.906223 1.8196)
    WeldJoint mtp_r: socket_parent_frame=calcn_r_offset socket_child_frame=toes_r_offset
      PhysicalOffsetFrame calcn_r_offset: socket_parent=/bodyset/calcn_r
          translation=(0.2151784 -0.002389326 0.001395357) orientation=(-3.14159 0.619901 0)
      PhysicalOffsetFrame toes_r_offset: socket_parent=/bodyset/toes_r translation=(0 0 0)
          orientation=(-3.14159 0.619901 0)
    CustomJoint back: socket_parent_frame=pelvis_offset socket_child_frame=torso_offset
      Coordinate lumbar_extension: default_value=0 range=(-1.570796 1.570796) clamped=true
      PhysicalOffsetFrame pelvis_offset: socket_parent=/bodyset/pelvis translation=(-0.147523 0.07451757 0)
      PhysicalOffsetFrame torso_offset: socket_parent=/bodyset/torso translation=(0 0 0)
      SpatialTransform: axes_held_at_zero=(rotation2 rotation3 translation1 translation2 translation3)
        TransformAxis rotation1: coordinates=lumbar_extension axis=(0 0 1) LinearFunction(coefficients=1 0)
  ConstraintSet:
    CoordinateCouplerConstraint patellofemoral_knee_flexion_r_con: independent_coordinate_names=knee_flexion_r
        dependent_coordinate_name=patellar_flexion_r scale_factor=1
        coupled_coordinates_function=LinearFunction(coefficients=1 0)
    WeldConstraint weld_heel_r: socket_frame1=ground_offset socket_frame2=calcn_r_offset
      PhysicalOffsetFrame ground_offset: socket_parent=/ground translation=(0 0 0.19) orientation=(0 -0.0872665 0)
      PhysicalOffsetFrame calcn_r_offset: socket_parent=/bodyset/calcn_r translation=(0 0 0)
  ForceSet:
    Blankevoort1991Ligament cPT: linear_stiffness=6000 [N] slack_length=0.05737841 [m]
      PathPoint cPT_f: patella_r (0.002320781 0.001160391 0)
      PathPoint cPT_t: tibia_r (0.0324634 -0.06640852 0.007497167)
      PathWrap: wrap_object=GasLat_at_condyles_r method=hybrid
    Blankevoort1991Ligament aPCL: linear_stiffness=2000 slack_length=0.04736561
      PathPoint aPCL_f: femur_r (0 -0.38896 -0.0044983)
      PathPoint aPCL_t: tibia_r (-0.02765401 -0.03205928 0.01049603)
    Blankevoort1991Ligament pPCL: linear_stiffness=2000 slack_length=0.03950607
      PathPoint pPCL_f: femur_r (0.003481172 -0.3917853 -0.002998867)
      PathPoint pPCL_t: tibia_r (-0.02885636 -0.03434923 0.007497167)
    Blankevoort1991Ligament aLCL: linear_stiffness=2000 slack_length=0.06222037
      PathPoint aLCL_f: femur_r (0 -0.3823674 0.05619089)
      PathPoint aLCL_t: tibia_r (-0.02284462 -0.06526354 0.05697847)
      PathWrap: wrap_object=tibia_lat_wrap method=hybrid
    Blankevoort1991Ligament mLCL: linear_stiffness=2750 slack_length=0.06442256
      PathPoint mLCL_f: femur_r (-0.004641563 -0.3822391 0.05547904)
      PathPoint mLCL_t: tibia_r (-0.02645166 -0.06526354 0.05697847)
      PathWrap: wrap_object=tibia_lat_wrap method=hybrid
    Blankevoort1991Ligament pLCL: linear_stiffness=2750 slack_length=0.06293141
      PathPoint pLCL_f: femur_r (-0.009283126 -0.3823674 0.05547904)
      PathPoint pLCL_t: tibia_r (-0.03364458 -0.06267938 0.05320446)
      PathWrap: wrap_object=tibia_lat_wrap method=hybrid
    Blankevoort1991Ligament aMCL: linear_stiffness=2750 slack_length=0.1010653
      PathPoint aMCL_f: femur_r (0.00570567 -0.3834498 -0.05547904)
      PathPoint aMCL_t: tibia_r (0.01088494 -0.09159796 -0.0134949)
      PathWrap: wrap_object=tibia_med_wrap method=hybrid
    Blankevoort1991Ligament mMCL: linear_stiffness=9000 slack_length=0.1316293
      PathPoint mMCL_f: femur_r (-0.0002847033 -0.3839149 -0.05547904)
      PathPoint mMCL_t: tibia_r (0.00587016 -0.09503288 -0.01499433)
      PathWrap: wrap_object=tibia_med_wrap method=hybrid
    Blankevoort1991Ligament pMCL: linear_stiffness=9000 slack_length=0.1044055
      PathPoint pMCL_f: femur_r (-0.006368173 -0.3848074 -0.05547904)
      PathPoint pMCL_t: tibia_r (0 -0.09732283 -0.01499433)
      PathWrap: wrap_object=tibia_med_wrap method=hybrid
